*Heading
** Job name: 1-Skrastag Model name: Skr�stag-del
** Generated by: Abaqus/CAE 2022
*Preprint, echo=NO, model=NO, history=NO, contact=NO
**
** PARTS
**
*Part, name=Part-1
*Node
      1,   3.53958344,  0.567180932
      2,   3.53242826,  0.574083924
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*Element, type=WARP2D4
 1,   1,   2, 162, 185
 2, 185, 162, 163, 184
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*Element, type=WARP2D3
572, 71, 73, 72
862, 68, 67, 78
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*Nset, nset=Betongdekke
    63,    66,    68,    69,    74,    77
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*Elset, elset=Betongdekke, generate
  1931,  13778,      1
*Nset, nset=Stalkasse
    1,    2,    3,    4,    5,    6
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*Elset, elset=Stalkasse, generate
    1,  1930,     1
** Section: Steel
*Solid Section, elset=Stalkasse, material=Steel
,
** Section: Betong
*Solid Section, elset=Betongdekke, material=Concrete
,
*End Part
**
**
** ASSEMBLY
**
*Assembly, name=Assembly
**
*Instance, name=Part-1-1, part=Part-1
*End Instance
**
*End Assembly
**
** MATERIALS
**
*Material, name=Concrete
*Density
2900.065160793475
*Elastic
34999999969.373535, 0.2
*Material, name=Steel
*Density
9999.999997594501
*Elastic
150000000164.24725, 0.3
** ----------------------------------------------------------------
**
** STEP: Step-1
**
*Step, name=Step-1, nlgeom=NO
*Beam Section Generate
*End Step
