*Heading
** Job name: 2-Viadukt Model name: Viadukt-del
** Generated by: Abaqus/CAE 2022
*Preprint, echo=NO, model=NO, history=NO, contact=NO
**
** PARTS
**
*Part, name=Part-1
*Node
      1,   2.46000004, 0.00771891838
      2,   2.45786047, 0.0160000008
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*Element, type=WARP2D4
  1,   1,   2, 157, 508
  2, 508, 157, 158, 507
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*Element, type=WARP2D3
434, 980, 970, 971
452,  992, 1007, 1008
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*Nset, nset=Betong
    70,    71,   121,   122,   139,   156
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*Elset, elset=Betong, generate
  2155,  11636,      1
*Nset, nset=St�l
    1,    2,    3,    4,    5,    6
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*Elset, elset=St�l, generate
    1,  2154,     1
** Section: Steel
*Solid Section, elset=St�l, material=Steel
,
** Section: Betong
*Solid Section, elset=Betong, material=Concrete
,
*End Part
**
**
** ASSEMBLY
**
*Assembly, name=Assembly
**
*Instance, name=Part-1-1, part=Part-1
*End Instance
**
*End Assembly
**
** MATERIALS
**
*Material, name=Concrete
*Density
2900.065160793475
*Elastic
34999999969.373535, 0.2
*Material, name=Steel
*Density
9999.999997594501
*Elastic
150000000164.24725, 0.3
** ----------------------------------------------------------------
**
** STEP: Step-1
**
*Step, name=Step-1, nlgeom=NO
*Beam Section Generate
*End Step
