*HEADING
Grenland Bridge - Dynamic analysis
**
*PREPRINT, ECHO=YES, MODEL=YES, HISTORY=YES
**
*MATERIAL, NAME=S355
*DENSITY
7850
*ELASTIC, TYPE=ISOTROPIC
2.1E+11, 0.3
**
*MATERIAL, NAME=B45
*DENSITY
2500
*ELASTIC, TYPE=ISOTROPIC
0.27E+11, 0.2
**
*MATERIAL, NAME=DUMMY_SECTION
*DENSITY
0
*ELASTIC, TYPE=ISOTROPIC
0.1, 0
**
*MATERIAL, NAME=CABLE
*DENSITY
7850
*ELASTIC, TYPE=ISOTROPIC
1.6E+11, 0.3
**
*PART, NAME=BRIDGE
*END PART
**
*ASSEMBLY, NAME=BRIDGE_ASSEMBLY
**
*INSTANCE, NAME=BRIDGE_1, PART=BRIDGE
*NODE, NSET=BRIDGE_DECK_NODES
1, 0, 0, 51
2, 1, 0, 51
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**
*NODE, NSET=MAIN_TOWER_WEST
610, 67, -9.5, 0
611, 67, -9.47, 1
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**
*NODE, NSET=MAIN_TOWER_EAST
775, 67, 9.5, 0
776, 67, 9.47, 1
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**
*NODE, NSET=MAIN_TOWER_LOWER_COUPLING
940, 67, -7, 51
941, 67, -6, 51
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**
*NODE, NSET=MAIN_TOWER_MID_COUPLING
954, 67, -6, 93
955, 67, -5, 93
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**
*NODE, NSET=MAIN_TOWER_UPPER_COUPLING
967, 67, -5, 130
968, 67, -4, 130
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*NODE, NSET=CABLE_ANCHOR_WEST
1163, 0, -6, 51
1164, -5, -6, 58
1165, -10, -6, 65
1166, -15, -6, 72
1167, -20, -6, 79
1168, -25, -6, 86
**
*NODE, NSET=CABLE_ANCHOR_EAST
1169, 0, 6, 51
1170, -5, 6, 58
1171, -10, 6, 65
1172, -15, 6, 72
1173, -20, 6, 79
1174, -25, 6, 86
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**
*ELEMENT, TYPE=B31, ELSET=BRIDGE_DECK_ELEMENTS
1, 1, 2
2, 2, 3
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**
*ELEMENT, TYPE=B31, ELSET=MAIN_TOWER_WEST_ELEMENTS
609, 610, 611
610, 611, 612
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*ELEMENT, TYPE=B31, ELSET=MAIN_TOWER_EAST_ELEMENTS
773, 775, 776
774, 776, 777
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**
*ELEMENT, TYPE=B31, ELSET=MAIN_TOWER_LOWER_COUPLING_ELEMENTS
937, 661, 940
938, 940, 941
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**
*ELEMENT, TYPE=B31, ELSET=MAIN_TOWER_MID_COUPLING_ELEMENTS
953, 703, 954
954, 954, 955
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**
*ELEMENT, TYPE=B31, ELSET=MAIN_TOWER_UPPER_COUPLING_ELEMENTS
967, 740, 967
968, 967, 968
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*ELEMENT, TYPE=B31, ELSET=WEST_NORTH_CABLE_ELEMENTS
1165, 1168, 771
1166, 1167, 767
1167, 1166, 763
1168, 1165, 759
1169, 1164, 755
1170, 1163, 751
1171, 1175, 747
1172, 1176, 743
**
*ELEMENT, TYPE=B31, ELSET=WEST_SOUTH_CABLE_ELEMENTS
1173, 771, 1189
1174, 769, 1188
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**
*ELEMENT, TYPE=B31, ELSET=EAST_NORTH_CABLE_ELEMENTS
1186, 1174, 936
1187, 1173, 932
1188, 1172, 928
1189, 1171, 924
1190, 1170, 920
1191, 1169, 916
1192, 1190, 912
1193, 1191, 908
**
*ELEMENT, TYPE=B31, ELSET=EAST_SOUTH_CABLE_ELEMENTS
1194, 936, 1204
1195, 934, 1203
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**
**
*ELSET, ELSET=CABLE_BRIDGE_DECK_ELEMENTS
1
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*ELSET, ELSET=MAIN_TOWER_WEST_BOTTOM_ELEMENTS
609
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*ELSET, ELSET=MAIN_TOWER_WEST_MID_ELEMENTS
659
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*ELSET, ELSET=MAIN_TOWER_WEST_UPPER_ELEMENTS
702
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*ELSET, ELSET=MAIN_TOWER_WEST_TOP_ELEMENTS
739
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*ELSET, ELSET=MAIN_TOWER_EAST_BOTTOM_ELEMENTS
773
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*ELSET, ELSET=MAIN_TOWER_EAST_MID_ELEMENTS
823
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*ELSET, ELSET=MAIN_TOWER_EAST_UPPER_ELEMENTS
866
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*ELSET, ELSET=MAIN_TOWER_EAST_TOP_ELEMENTS
903
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**
**
*NODE, NSET=ACC_METER_NODES
1205, 29, -5.8, 51
1206, 29, 5.8, 51
*NSET, NSET=CABLE_ANCHOR_WEST
1205
1175
1176
1177
1178
1179
1180
1181
1182
1183
1184
1185
1186
1187
1188
1189
*NSET, NSET=CABLE_ANCHOR_EAST
1206
1190
1191
1192
1193
1194
1195
1196
1197
1198
1199
1200
1201
1202
1203
1204
*NSET, NSET=CABLE_ANCHOR_BRIDGE
17
30
41
95
115
135
155
175
195
215
235
255
275
295
315
335
**
*SURFACE, TYPE=NODE, NAME=CABLE_ANCHOR_WEST_SRF
CABLE_ANCHOR_WEST, 1
*SURFACE, TYPE=NODE, NAME=CABLE_ANCHOR_EAST_SRF
CABLE_ANCHOR_EAST, 1
*SURFACE, TYPE=NODE, NAME=CABLE_ANCHOR_BRIDGE
CABLE_ANCHOR_BRIDGE, 1
**
*TIE, NAME=CABLE_ANCHOR_CONNECTION_WEST, ADJUST=NO, POSITION TOLERANCE=5.8
CABLE_ANCHOR_WEST_SRF, CABLE_ANCHOR_BRIDGE
*TIE, NAME=CABLE_ANCHOR_CONNECTION_EAST, ADJUST=NO, POSITION TOLERANCE=5.8
CABLE_ANCHOR_EAST_SRF, CABLE_ANCHOR_BRIDGE
**
*BEAM GENERAL SECTION, SECTION=MESHED, ELSET=CABLE_BRIDGE_DECK_ELEMENTS
0, 1, 0
*INCLUDE, INPUT=1-Skrastag.bsp
**
**
*BEAM SECTION, ELSET=MAIN_TOWER_WEST_BOTTOM_ELEMENTS, MATERIAL=B45, SECTION=BOX
7.129, 2.5, 0.5, 0.5, 0.5, 0.5
1, 0, 0
**
*BEAM SECTION, ELSET=MAIN_TOWER_WEST_MID_ELEMENTS, MATERIAL=B45, SECTION=BOX
5.719, 2.5, 0.5, 0.5, 0.5, 0.5
1, 0, 0
**
*BEAM SECTION, ELSET=MAIN_TOWER_WEST_UPPER_ELEMENTS, MATERIAL=B45, SECTION=BOX
4.841, 2.5, 0.5, 0.5, 0.5, 0.5
1, 0, 0
**
*BEAM SECTION, ELSET=MAIN_TOWER_WEST_TOP_ELEMENTS, MATERIAL=B45, SECTION=BOX
4.5, 2.5, 0.5, 0.5, 0.5, 0.5
1, 0, 0
**
*BEAM SECTION, ELSET=MAIN_TOWER_EAST_BOTTOM_ELEMENTS, MATERIAL=B45, SECTION=BOX
7.129, 2.5, 0.5, 0.5, 0.5, 0.5
1, 0, 0
**
*BEAM SECTION, ELSET=MAIN_TOWER_EAST_MID_ELEMENTS, MATERIAL=B45, SECTION=BOX
5.719, 2.5, 0.5, 0.5, 0.5, 0.5
1, 0, 0
**
*BEAM SECTION, ELSET=MAIN_TOWER_EAST_UPPER_ELEMENTS, MATERIAL=B45, SECTION=BOX
4.841, 2.5, 0.5, 0.5, 0.5, 0.5
1, 0, 0
**
*BEAM SECTION, ELSET=MAIN_TOWER_EAST_TOP_ELEMENTS, MATERIAL=B45, SECTION=BOX
4.5, 2.5, 0.5, 0.5, 0.5, 0.5
1, 0, 0
**
*BEAM SECTION, ELSET=MAIN_TOWER_LOWER_COUPLING_ELEMENTS, MATERIAL=B45, SECTION=BOX
5, 4.33, 0.3, 0.6, 0.3, 0.6
**
*BEAM SECTION, ELSET=MAIN_TOWER_MID_COUPLING_ELEMENTS, MATERIAL=B45, SECTION=BOX
3.5, 3.22, 0.3, 0.6, 0.3, 0.6
**
*BEAM SECTION, ELSET=MAIN_TOWER_UPPER_COUPLING_ELEMENTS, MATERIAL=B45, SECTION=BOX
3.5, 2.5, 0.3, 0.6, 0.3, 0.6
**
*BEAM SECTION, ELSET=WEST_NORTH_CABLE_ELEMENTS, MATERIAL=S355, SECTION=CIRC
0.05
**
*BEAM SECTION, ELSET=WEST_SOUTH_CABLE_ELEMENTS, MATERIAL=S355, SECTION=CIRC
0.05
**
*BEAM SECTION, ELSET=EAST_NORTH_CABLE_ELEMENTS, MATERIAL=S355, SECTION=CIRC
0.05
**
*BEAM SECTION, ELSET=EAST_SOUTH_CABLE_ELEMENTS, MATERIAL=S355, SECTION=CIRC
0.05
**
*END INSTANCE
**
**
*INSTANCE, NAME=BRIDGE_2, PART=BRIDGE
*NODE, NSET=BRIDGE_DECK_NODES
359, 358, 0, 51
360, 359, 0, 51
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**
*NODE, NSET=COLUMN_3
978, 372, 0, 1
979, 372, 0, 2
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**
*NODE, NSET=COLUMN_4
1028, 420, 0, 1
1029, 420, 0, 2
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**
*NODE, NSET=COLUMN_5
1078, 468, 0, 11
1079, 468, 0, 12
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**
*NODE, NSET=COLUMN_6
1118, 516, 0, 24
1119, 516, 0, 25
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**
*NODE, NSET=COLUMN_7
1145, 564, 0, 33
1146, 564, 0, 34
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**
*ELEMENT, TYPE=B31, ELSET=BRIDGE_DECK_ELEMENTS
359, 359, 360
360, 360, 361
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**
*ELEMENT, TYPE=B31, ELSET=COLUMN_3_ELEMENTS
980, 978, 979
981, 979, 980
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**
*ELEMENT, TYPE=B31, ELSET=COLUMN_4_ELEMENTS
1030, 1028, 1029
1031, 1029, 1030
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**
*ELEMENT, TYPE=B31, ELSET=COLUMN_5_ELEMENTS
1080, 1078, 1079
1081, 1079, 1080
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**
*ELEMENT, TYPE=B31, ELSET=COLUMN_6_ELEMENTS
1120, 1118, 1119
1121, 1119, 1120
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**
*ELEMENT, TYPE=B31, ELSET=COLUMN_7_ELEMENTS
1147, 1145, 1146
1148, 1146, 1147
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**
**
*ELSET, ELSET=VIADUCT_BRIDGE_DECK_ELEMENTS
359
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**
*NODE, NSET=ACC_METER_NODES
1163, 372, -5.8, 51
1164, 399, -5.8, 51
1165, 372, 5.8, 51
1166, 399, 5.8, 51
*NSET, NSET=ACC_METER_WEST
1163
1164
*NSET, NSET=ACC_METER_EAST
1165
1166
*NSET, NSET=ACC_METER_BRIDGE
373
400
**
*SURFACE, TYPE=NODE, NAME=ACC_METER_WEST_SRF
ACC_METER_WEST, 1
*SURFACE, TYPE=NODE, NAME=ACC_METER_EAST_SRF
ACC_METER_EAST, 1
*SURFACE, TYPE=NODE, NAME=ACC_METER_BRIDGE_SRF
ACC_METER_BRIDGE, 1
**
*TIE, NAME=CABLE_ANCHOR_CONNECTION_WEST, ADJUST=NO, POSITION TOLERANCE=5.8
ACC_METER_WEST_SRF, ACC_METER_BRIDGE_SRF
*TIE, NAME=CABLE_ANCHOR_CONNECTION_EAST, ADJUST=NO, POSITION TOLERANCE=5.8
ACC_METER_EAST_SRF, ACC_METER_BRIDGE_SRF
**
**
*BEAM GENERAL SECTION, SECTION=MESHED, ELSET=VIADUCT_BRIDGE_DECK_ELEMENTS
0, 1, 0
*INCLUDE, INPUT=2-Viadukt.bsp
**
*BEAM SECTION, ELSET=COLUMN_3_ELEMENTS, MATERIAL=B45, SECTION=RECT
5.388, 1.8
0, 1, 0
**
*BEAM SECTION, ELSET=COLUMN_4_ELEMENTS, MATERIAL=B45, SECTION=RECT
5.386, 1.8
0, 1, 0
**
*BEAM SECTION, ELSET=COLUMN_5_ELEMENTS, MATERIAL=B45, SECTION=RECT
5.27, 1.5
0, 1, 0
**
*BEAM SECTION, ELSET=COLUMN_6_ELEMENTS, MATERIAL=B45, SECTION=RECT
5.113, 1.3
0, 1, 0
**
*BEAM SECTION, ELSET=COLUMN_7_ELEMENTS, MATERIAL=B45, SECTION=RECT
5.007, 1.3
0, 1, 0
**
**
*END INSTANCE
**
*ELEMENT, TYPE=CONN3D2
1, BRIDGE_1.359, BRIDGE_2.359
*CONNECTOR SECTION, ELSET=CONNECTION, BEHAVIOR=CONNECTION_BEHAVIOR
CARTESIAN, ROTATION
"CONNECTION_ORIENTATION"
*ELSET, ELSET=CONNECTION
1
*ORIENTATION, NAME="CONNECTION_ORIENTATION"
1, 0, 0, 0, 1, 0
1, 0
**
*NSET, NSET=ACCELEROMETERS_1, INSTANCE=BRIDGE_1
1205
1206
1178
1193
1181
1196
1183
1198
1185
1200
1187
1202
1189
1204
740
905
*NSET, NSET=ACCELEROMETERS_2, INSTANCE=BRIDGE_2
1163
1164
1165
1166
**
*NSET, NSET=BRIDGE_DECK_NODES_1, INSTANCE=BRIDGE_1
1
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*NSET, NSET=BRIDGE_DECK_NODES_2, INSTANCE=BRIDGE_2
359
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**
*END ASSEMBLY
**
*CONNECTOR BEHAVIOR, NAME=CONNECTION_BEHAVIOR
*CONNECTOR ELASTICITY, COMPONENT=1
1
*CONNECTOR ELASTICITY, COMPONENT=2
24883199840.566105
*CONNECTOR ELASTICITY, COMPONENT=3
351843733.4309231
*CONNECTOR ELASTICITY, COMPONENT=4
3439853628628.9883
*CONNECTOR ELASTICITY, COMPONENT=5
52776559485.2561
*CONNECTOR ELASTICITY, COMPONENT=6
2488319983987.6084
**
*STEP, NAME=Static
Static analysis
*STATIC
1, 1, 1E-5, 1
**
*NSET, NSET=SUPPORT_NODES_NORTH, INSTANCE=BRIDGE_1
1
*NSET, NSET=SUPPORT_MAIN_TOWER, INSTANCE=BRIDGE_1
610, 775
*NSET, NSET=SUPPORT_CABLE_ANCHOR, INSTANCE=BRIDGE_1
1163, 1164, 1165, 1166, 1167, 1168, 1169, 1170, 1171, 1172, 1173, 1174
**
*NSET, NSET=SUPPORT_NODES_SOUTH, INSTANCE=BRIDGE_2
609
*NSET, NSET=SUPPORT_COLUMN_3, INSTANCE=BRIDGE_2
978
*NSET, NSET=SUPPORT_COLUMN_4, INSTANCE=BRIDGE_2
1028
*NSET, NSET=SUPPORT_COLUMN_5, INSTANCE=BRIDGE_2
1078
*NSET, NSET=SUPPORT_COLUMN_6, INSTANCE=BRIDGE_2
1118
*NSET, NSET=SUPPORT_COLUMN_7, INSTANCE=BRIDGE_2
1145
**
*BOUNDARY
SUPPORT_NODES_SOUTH, 1, 3, 0
SUPPORT_NODES_NORTH, 1, 6, 0
SUPPORT_MAIN_TOWER, 1, 6, 0
SUPPORT_COLUMN_3, 1, 6, 0
SUPPORT_COLUMN_4, 1, 6, 0
SUPPORT_COLUMN_5, 1, 6, 0
SUPPORT_COLUMN_6, 1, 6, 0
SUPPORT_COLUMN_7, 1, 6, 0
SUPPORT_CABLE_ANCHOR, 1, 3, 0
**
*DLOAD, OP=NEW
, GRAV, 9.81, 0, 0, -1
**
*OUTPUT, FIELD
*NODE OUTPUT
RF, U, UR
**
*OUTPUT, FIELD
*ELEMENT OUTPUT
SF
**
*END STEP
**
*STEP, NAME=Modal
Modal analysis
**
*FREQUENCY
90
**
*OUTPUT, FIELD
*NODE OUTPUT
U, UR
**
*OUTPUT, FIELD
*ELEMENT OUTPUT, POSITION=NODES, DIRECTIONS=YES
NFORC, SF
**
*END STEP
